*Heading
** Job name: Job-4 Model name: Model-1
** Generated by: Abaqus/CAE 2022
*Preprint, echo=NO, model=NO, history=NO, contact=NO
**
** PARTS
**
*Part, name=Part-1
*Node
      1,          10.,          10.,           1.
      2,          10.,           0.,           1.
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*Element, type=C3D4
  1, 221, 222, 203, 179
  2, 221, 131, 222, 108
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*Nset, nset=Set-1, generate
   1,  239,    1
*Elset, elset=Set-1, generate
   1,  666,    1
** Section: Section-1
*Solid Section, elset=Set-1, material=Material-1
,
*End Part
**
**
** ASSEMBLY
**
*Assembly, name=Assembly
**
*Instance, name=Part-1-1, part=Part-1
*End Instance
**
*Nset, nset=Set-1, instance=Part-1-1
  2,  3,  5,  6, 29, 30, 31, 32, 33, 34, 35, 36
*Elset, elset=Set-1, instance=Part-1-1
 310, 618, 621, 623, 626, 629, 630, 637, 638, 645
*Nset, nset=Set-2, instance=Part-1-1
  7,  8,  9, 10, 51, 52, 53, 54, 73, 74, 75, 76
*Elset, elset=Set-2, instance=Part-1-1
  72,  76,  92, 307, 339, 344, 457, 458, 470, 553
*Nset, nset=_PickedSet7, internal, instance=Part-1-1
   1,   2,   5,   7,  10,  11
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*Elset, elset=_PickedSet7, internal, instance=Part-1-1
  17,  32,  35,  44,  47,  49
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*Nset, nset=_PickedSet8, internal, instance=Part-1-1
   3,   4,   6,   8,   9,  20
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*Elset, elset=_PickedSet8, internal, instance=Part-1-1
  21,  31,  75, 106, 111, 112
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*Nset, nset=_PickedSet9, internal, instance=Part-1-1
  1,  2,  3,  4, 11, 12
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*Elset, elset=_PickedSet9, internal, instance=Part-1-1
  98,  99, 214, 317, 421, 466
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*End Assembly
**
** MATERIALS
**
*Material, name=Material-1
*Depvar
     13,
1, EE11, EE11
2, EE22, EE22
3, EE33, EE33
4, EE12, EE12
5, EE13, EE13
6, EE23, EE23
7, EP11, EP11
8, EP22, EP22
9, EP33, EP33
10, EP12, EP12
11, EP13, EP13
12, EP23, EP23
13, PEEQ, PEEQ
*User Material, constants=42309
70000, 0.3, -0.18735649, 0.3285986, 0.24065857, 0.3822169, -0.39524972, 0.7560654,
-0.21652523, 0.0016259083, 0.0059272195, 0.0071008275, -0.04001285, -0.3220953, 0.83279955, 0.338487,
-0.78195024, 0.3490022, 0.1421702, -0.29559645, 0.20684151, 0.87960476, -0.15279867, -0.30006474,
0.23783877, 0.45088407, 0.2439573, -0.29571536, -0.23736332, 0.8283425, -1.0601144, -0.03852352,
-0.43590888, -0.27929527, 0.06487247, -0.34232113, 0.42847463, -0.25683022, 0.26809332, 0.2686463,
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-0.048405886, 1.5541884e-06, 0.0019809788, 1.2729147e-06, 0.012638003,
**
** BOUNDARY CONDITIONS
**
** Name: BC-1 Type: Displacement/Rotation
*Boundary
Set-1, 2, 2
** Name: BC-2 Type: Displacement/Rotation
*Boundary
Set-2, 1, 1
** ----------------------------------------------------------------
**
** STEP: Step-1
**
*Step, name=Step-1, nlgeom=NO
*Static, direct
0.02, 1.,
**
** BOUNDARY CONDITIONS
**
** Name: BC-3 Type: Displacement/Rotation
*Boundary
_PickedSet7, 3, 3
** Name: BC-4 Type: Displacement/Rotation
*Boundary
_PickedSet8, 3, 3
** Name: BC-5 Type: Displacement/Rotation
*Boundary

_PickedSet9, 1, 1, 0.05
**
** OUTPUT REQUESTS
**
*Restart, write, frequency=0
**
** FIELD OUTPUT: F-Output-1
**
*Output, field, variable=PRESELECT
*Element OUTPUT
SDV
**
** HISTORY OUTPUT: H-Output-1
**
*Output, history, variable=PRESELECT
*CONTROLS,PARAMETERS=FIELD
0.01,0.01,0.01,,0.02,1.e-5,1.e-3,1.e-8
*End Step
